# OpenSim document version 40000
Model RightArmAndHand_NoMuscles:
  gravity: 0 -9.80665 0
  credits: Sobinov A., Goodman J., Hardesty R., et al.
  length_units: meters
  force_units: N
  publications:
    https://github.com/nishbo/ms_arm_and_hand
    Menegolo Andrea, https://simtk.org/projects/ulb_project
    Delp SL, Anderson FC, Arnold AS, Loan P, Habib A, John CT, Guendelman E, Thelen DG (in press). OpenSim: Open-source Software to Create and Analyze Dynamic Simulations of Movement. IEEE Transactions on Biomedical Engineering. (2007)
    Holzbaur KR, Murray WM, Delp SL.: A model of the upper extremity for simulating musculoskeletal surgery and analyzing neuromuscular control., Ann Biomed Eng. 2005 Jun;33(6):829-40. (2005)
  Ground
  BodySet:
    Body Thorax: mass=0 [kg] mass_center=(0 0 0) inertia=(0 0 0 0 0 0) meshes=thorax.vtp
      WrapEllipsoid RA_Thorax: xyz_body_rotation=(0.0434587 -0.3319616 0.1898918) translation=(-0.0386 -0.1273 0.0709)
          quadrant=all dimensions=(0.1 0.135 0.08)
      WrapEllipsoid LA_Thorax: xyz_body_rotation=(-0.0434587 0.3319616 0.1898918) translation=(-0.0386 -0.1273 -0.0709)
          quadrant=all dimensions=(0.1 0.135 0.08)
    Body PS: mass=0 mass_center=(0 0 0) inertia=(0 0 0 0 0 0)
    Body RPS: mass=0 mass_center=(0 0 0) inertia=(0 0 0 0 0 0) meshes=block.vtp
    Body LPS: mass=0 mass_center=(0 0 0) inertia=(0 0 0 0 0 0) meshes=block.vtp
    Body RA_clavicle: mass=0 mass_center=(0 0 0) inertia=(0 0 0 0 0 0) meshes=clavicle.vtp
    Body RA_clavphant: mass=0 mass_center=(0 0 0) inertia=(0 0 0 0 0 0)
    Body RA_scapula: mass=0.70396 mass_center=(-0.054694 -0.035032 -0.043734) inertia=(0 0 0 0 0 0) meshes=scapula.vtp
      WrapEllipsoid RA_Deltoid2: active=false xyz_body_rotation=(3.130423 -1.548805 -1.314233)
          translation=(-0.0058 -0.0378 0.0096) quadrant=-y dimensions=(0.03 0.04 0.035)
      WrapTorus RA_Delt3: active=false xyz_body_rotation=(0.6209881 0.32882 -0.5607743)
          translation=(-0.0973 -0.0428 -0.037) quadrant=all inner_radius=0.04 outer_radius=0.06
      WrapTorus RA_INFSP: xyz_body_rotation=(0.02530727 0.5883505 0.1518436) translation=(-0.0561 -0.0199 -0.0112)
          quadrant=all inner_radius=0.008 outer_radius=0.019
      WrapEllipsoid RA_TMIN: xyz_body_rotation=(-2.097537 -0.2808235 -1.763481) translation=(-0.0418 -0.0519 -0.0359)
          quadrant=x dimensions=(0.03 0.03 0.05)
      WrapCylinder RA_TRIlongglen: xyz_body_rotation=(1.375319 -0.2946116 2.435956)
          translation=(-0.0359 -0.0309 -0.0132) quadrant=x radius=0.003 length=0.03
    Body RA_scapphant: mass=0.0001 mass_center=(0 0 0) inertia=(0 0 0 0 0 0)
    Body RA1H_PHANT: mass=0.0001 mass_center=(0 0 0) inertia=(0 0 0 0 0 0)
    Body RA1H_PHANT1: mass=0.0001 mass_center=(0 0 0) inertia=(0 0 0 0 0 0)
    Body RA1H: mass=1.99757 mass_center=(0.018064 -0.140141 -0.012746) inertia=(0 0 0 0 0 0) meshes=humerus.vtp
      WrapEllipsoid RA_DELT1hh: xyz_body_rotation=(0.05846853 1.004612 0.5703736) translation=(-0.0139 -0.0127 -0.0262)
          quadrant=z dimensions=(0.03 0.1 0.05)
      WrapCylinder RA_delt2hum: xyz_body_rotation=(1.680927 -0.02495821 0.05166175) translation=(0.0017 -0.0958 0.0011)
          quadrant=all radius=0.0094 length=0.05
      WrapEllipsoid RA_delt3hum: xyz_body_rotation=(1.727352 0.07592182 -2.743134) translation=(0.0019 -0.0592 0.0011)
          quadrant=x dimensions=(0.01 0.01 0.05)
      WrapEllipsoid RA_SUPSP: xyz_body_rotation=(0.03804818 0.00855211 -1.306728) translation=(0.0002 0.0077 0.0043)
          quadrant=all dimensions=(0.02 0.02 0.02)
      WrapEllipsoid RA_INFSP_and_TMIN_hum_head: xyz_body_rotation=(-0.2865831 -0.00907571 -0.06841691)
          translation=(-0.0003 0.0026 0.0038) quadrant=all dimensions=(0.02 0.025 0.02)
      WrapEllipsoid RA_SUBSCAP: xyz_body_rotation=(-0.9245009 0.288852 0.381529) translation=(-0.0025 0.0007 -0.0045)
          quadrant=all dimensions=(0.02 0.017 0.028)
      WrapCylinder RA_TMINhum: xyz_body_rotation=(1.753532 0.06928957 2.746276) translation=(-0.0014 -0.0455 0)
          quadrant=x radius=0.007 length=0.07
      WrapSphere RA_TMAJ_LAT_PEC_CORBhh: translation=(0.0007 0 0.006) quadrant=all radius=0.03
      WrapCylinder RA_TMAJ_LAThum: xyz_body_rotation=(1.536413 -0.06370452 1.41424)
          translation=(0.0007 -0.0443 -0.0055) quadrant=-x radius=0.007 length=0.04
      WrapEllipsoid RA_PEC1hh: xyz_body_rotation=(-0.6204646 -0.3104941 0.3637266) translation=(-0.0037 0.0005 -0.0025)
          quadrant=-z dimensions=(0.03 0.02 0.02)
      WrapCylinder RA_PEC12hum: xyz_body_rotation=(1.559277 -0.07749262 -0.9258972) translation=(0.002 -0.0508 -0.0017)
          quadrant=x radius=0.009 length=0.07
      WrapSphere RA_PEC23hh: translation=(-0.0086 0.0021 -0.0004) quadrant=all radius=0.02
      WrapCylinder RA_PEC3hum: xyz_body_rotation=(1.440944 -0.0561996 1.751961) translation=(0.0009 -0.0551 -0.0004)
          quadrant=-x radius=0.008 length=0.07
      WrapCylinder RA_LAT_TMAJhh: xyz_body_rotation=(-0.3050835 -0.01832596 -0.6866125)
          translation=(-0.0224 0.0102 0.0094) quadrant=-y radius=0.007 length=0.045
      WrapSphere RA_LAT_TMAJ2hh: xyz_body_rotation=(-0.1272345 0.2761111 0.01972222)
          translation=(-0.0016 0.0092 0.0052) quadrant=-z radius=0.03
      WrapCylinder RA_CORBhum: xyz_body_rotation=(-1.608321 0.09599311 0.8752826) translation=(0.0027 -0.1202 -0.0059)
          quadrant=x radius=0.008 length=0.05
      WrapEllipsoid RA_TRIlonghh: xyz_body_rotation=(3.001617 -0.853466 2.574186) translation=(-0.0078 -0.0041 -0.0014)
          quadrant=z dimensions=(0.035 0.02 0.02)
      WrapCylinder RA_TRI: xyz_body_rotation=(-0.1401499 -0.00628319 0.1549852) translation=(0.0028 -0.2919 -0.0119)
          quadrant=all radius=0.016 length=0.04
      WrapEllipsoid RA_ANC: xyz_body_rotation=(0.00750492 -0.1966986 1.049292) translation=(0.0134 -0.2861 -0.0008)
          quadrant=-x dimensions=(0.02 0.02 0.02)
      WrapEllipsoid RA_BIClong: xyz_body_rotation=(-2.004336 -1.001644 0.9754645) translation=(0.0033 0.0073 0.0003)
          quadrant=-y dimensions=(0.025 0.02 0.02)
      WrapEllipsoid RA_Elbow_BIC_BRD: xyz_body_rotation=(-0.1286308 0.1375319 0.03071779)
          translation=(0.0019 -0.289 -0.014) quadrant=x dimensions=(0.015 0.015 0.1)
      WrapEllipsoid RA_Elbow_PT_ECRL: xyz_body_rotation=(-0.1610939 -0.1108284 0.6145304)
          translation=(0.003 -0.2872 -0.0069) quadrant=x dimensions=(0.018 0.025 0.035)
    Body RA2U: mass=1.1053 mass_center=(0.00971783 -0.0959509 0.024286) inertia=(0 0 0 0 0 0) meshes=ulna.vtp
      WrapCylinder RA_PQ2: xyz_body_rotation=(1.391376 0.06894051 1.522451) translation=(-0.0012 -0.2092 0.0428)
          quadrant=all radius=0.007 length=0.01
    Body RA2R: mass=0.23359 mass_center=(0.0336341 -0.181559 0.0156) inertia=(0 0 0 0 0 0) meshes=radius.vtp
      WrapCylinder RA_SUP: xyz_body_rotation=(1.447751 0.3040364 -2.441017) translation=(0.0045 -0.0437 0.0059)
          quadrant=-x radius=0.008 length=0.04
      WrapTorus RA_ECU: xyz_body_rotation=(-0.9866346 -0.1488766 0.222704) translation=(-0.0163 -0.2417 0.0349)
          quadrant=all inner_radius=0.006 outer_radius=0.009
      WrapCylinder RA_PQ1: xyz_body_rotation=(-1.607623 -0.0127409 -2.690251) translation=(0.0281 -0.1986 0.0288)
          quadrant=all radius=0.01 length=0.01
    Body RA3L: mass=0.0001 mass_center=(0 0 0) inertia=(0 0 0 0 0 0) meshes=lunate.vtp
      WrapEllipsoid RA_Extensor_ellipse: xyz_body_rotation=(-0.2508038 0.2855359 0.2328269)
          translation=(0.0007 -0.0135 0.0047) quadrant=z dimensions=(0.05 0.02 0.013)
      WrapTorus RA_ECRL: xyz_body_rotation=(1.538333 0.2343977 0.7311184) translation=(0.0222 -0.0096 0.0208)
          quadrant=all inner_radius=0.008 outer_radius=0.016
      WrapTorus RA_ECRB: xyz_body_rotation=(1.312662 -0.1178097 -0.1162389) translation=(0.0126 -0.0095 0.0186)
          quadrant=all inner_radius=0.008 outer_radius=0.01
      WrapTorus RA_FCR: xyz_body_rotation=(-1.555961 -0.1532399 -0.1000074) translation=(0.0032 -0.0045 -0.019)
          quadrant=all inner_radius=0.001 outer_radius=0.0025
      WrapTorus RA_FCU: xyz_body_rotation=(-1.573763 -0.07976155 0.39235) translation=(-0.0123 -0.0124 -0.0171)
          quadrant=all inner_radius=0.0068 outer_radius=0.008
      WrapEllipsoid RA_PL: xyz_body_rotation=(-0.03159046 0.0996583 0.06335545) translation=(0.0057 -0.018 -0.0041)
          quadrant=-z dimensions=(0.025 0.014 0.012)
      WrapEllipsoid RA_FDS: xyz_body_rotation=(0.00837758 -0.08168141 -0.01710423) translation=(0.0012 -0.0057 -0.0003)
          quadrant=-z dimensions=(0.025 0.013 0.012)
      WrapEllipsoid RA_FDP: xyz_body_rotation=(-1.467473 -0.1946042 0.121824) translation=(-0.0022 -0.0069 0.0032)
          quadrant=y dimensions=(0.025 0.013 0.012)
      WrapTorus RA_ED5: xyz_body_rotation=(2.363176 0.1930334 -0.2691298) translation=(-0.0128 -0.0133 0.0148)
          quadrant=all inner_radius=0.008 outer_radius=0.012
      WrapTorus RA_ED4: xyz_body_rotation=(1.983916 0.100531 0.5230752) translation=(-0.0098 -0.0137 0.0166)
          quadrant=all inner_radius=0.009 outer_radius=0.011
      WrapTorus RA_ED3: xyz_body_rotation=(1.993166 0.1979203 0.3682645) translation=(-0.0007 -0.0117 0.0191)
          quadrant=all inner_radius=0.009 outer_radius=0.012
      WrapTorus RA_ED2: xyz_body_rotation=(1.697682 0.08970992 0.00767945) translation=(0.009 -0.0149 0.0211)
          quadrant=all inner_radius=0.009 outer_radius=0.012
      WrapEllipsoid RA_EDM: xyz_body_rotation=(2.962696 0.1593486 0.1179843) translation=(-0.0167 -0.0022 0.0048)
          quadrant=-z dimensions=(0.018 0.014 0.008)
      WrapEllipsoid RA_FPL: xyz_body_rotation=(-0.1663299 -0.08220501 -0.06597345) translation=(0.017 -0.025 -0.0033)
          quadrant=-z dimensions=(0.016 0.01 0.01)
    Body RA3S: mass=0 mass_center=(0 0 0) inertia=(0 0 0 0 0 0) meshes=scaphoid.vtp
    Body RA3P: mass=0 mass_center=(0 0 0) inertia=(0 0 0 0 0 0) meshes=pisiform.vtp
    Body RA3Q: mass=0 mass_center=(0 0 0) inertia=(0 0 0 0 0 0) meshes=triquetrum.vtp
    Body RA3C: mass=0.32742 mass_center=(-0.00028 0.00333 -0.0045) inertia=(0 0 0 0 0 0) meshes=capitate.vtp
    Body RA3T: mass=1e-5 mass_center=(0 0 0) inertia=(0 0 0 0 0 0) meshes=trapezium.vtp
    Body RA3O: mass=1e-5 mass_center=(0 0 0) inertia=(0 0 0 0 0 0) meshes=trapezoid.vtp
    Body RA3H: mass=1e-5 mass_center=(0 0 0) inertia=(0 0 0 0 0 0) meshes=hamate.vtp
    Body RA4M1_PHANT: mass=1e-5 mass_center=(0 0 0) inertia=(0 0 0 0 0 0)
      WrapTorus RA_APL: active=false xyz_body_rotation=(-1.609892 0.2478367 -0.0301942)
          translation=(0.0082 0.0023 -0.0101) quadrant=all inner_radius=0.004 outer_radius=0.008
    Body RA4M1: mass=0.016 mass_center=(0.00784 -0.01472 -0.00602) inertia=(0 0 0 0 0 0) meshes=1mc.vtp
      WrapCylinder RA_MPthumb: xyz_body_rotation=(0.3213151 0.1101303 -0.834791) translation=(0.0177 -0.0305 -0.0143)
          quadrant=all radius=0.0085 length=0.02
    Body RA4M2: mass=0.03636364 mass_center=(0 0 0) inertia=(0 0 0 0 0 0) meshes=2mc.vtp
      WrapEllipsoid RA_2ndmcp: xyz_body_rotation=(1.486671 -1.296605 2.43072) translation=(0.0059 -0.0304 -0.0006)
          quadrant=-x dimensions=(0.005 0.005 0.03)
    Body RA4M3: mass=0.03809524 mass_center=(0 0 0) inertia=(0 0 0 0 0 0) meshes=3mc.vtp
    Body RA4M4: mass=0.03333333 mass_center=(-0.002 -0.0214 0.0034) inertia=(0 0 0 0 0 0) meshes=4mc.vtp
    Body RA4M5: mass=0.02962963 mass_center=(-0.00611809 -0.0176936 0.00542873) inertia=(0 0 0 0 0 0) meshes=5mc.vtp
    Body RA5P1: mass=0.0079 mass_center=(0.0096 -0.0163 -0.0063) inertia=(0 0 0 0 0 0) meshes=thumbprox.vtp
      WrapCylinder RA_IPthumb: xyz_body_rotation=(0.3047345 0.01291544 0.08796459) translation=(0.0121 -0.0302 -0.0096)
          quadrant=-x radius=0.0045 length=0.01
    Body RA6D1: mass=0.0031 mass_center=(0.00557 -0.01042 -0.0044) inertia=(0 0 0 0 0 0) meshes=thumbdist.vtp
    Body RA5P2: mass=0.0158 mass_center=(0.0044 -0.0253 0.004) inertia=(0 0 0 0 0 0) meshes=2proxph.vtp
      WrapCylinder RA_Secondpm: xyz_body_rotation=(0.7419395 -1.473931 0.7096509) translation=(0.0075 -0.0407 0.0061)
          quadrant=all radius=0.004 length=0.01
    Body RA6M2: mass=0.0049 mass_center=(0.0022 -0.0154 0.00018) inertia=(0 0 0 0 0 0) meshes=2midph.vtp
      WrapCylinder RA_Secondmd: xyz_body_rotation=(0.5017822 -1.413019 0.6473426) translation=(0.0036 -0.0243 0.0003)
          quadrant=x radius=0.003 length=0.01
    Body RA7D2: mass=0.0018 mass_center=(0.0013 -0.01 2e-5) inertia=(0 0 0 0 0 0) meshes=2distph.vtp
    Body RA5P3: mass=0.0193 mass_center=(0.00097 -0.0262 0.0037) inertia=(0 0 0 0 0 0) meshes=3proxph.vtp
    Body RA6M3: mass=0.00642 mass_center=(0.00071 -0.0168 0.0013) inertia=(0 0 0 0 0 0) meshes=3midph.vtp
    Body RA7D3: mass=0.00252 mass_center=(0.0005 -0.0102 -0.00028) inertia=(0 0 0 0 0 0) meshes=3distph.vtp
    Body RA5P4: mass=0.01374 mass_center=(-0.00223386 -0.0237516 0.00349321) inertia=(0 0 0 0 0 0) meshes=4proxph.vtp
    Body RA6M4: mass=0.00568 mass_center=(-0.00197812 -0.0147055 0.00118627) inertia=(0 0 0 0 0 0) meshes=4midph.vtp
    Body RA7D4: mass=0.0029 mass_center=(-0.000427077 -0.0101666 0.00202904) inertia=(0 0 0 0 0 0) meshes=4distph.vtp
    Body RA5P5: mass=0.01106 mass_center=(-0.00810107 -0.0210768 0.00214055) inertia=(0 0 0 0 0 0) meshes=5proxph.vtp
    Body RA6M5: mass=0.00372 mass_center=(-0.00489968 -0.0121355 -0.000152595) inertia=(0 0 0 0 0 0) meshes=5midph.vtp
    Body RA7D5: mass=0.00222 mass_center=(-0.00358265 -0.00888113 0.000331822) inertia=(0 0 0 0 0 0) meshes=5distph.vtp
  JointSet:
    CustomJoint ground_Thorax: socket_parent_frame=ground_offset socket_child_frame=Thorax_offset
      Coordinate Thorax_rot1: default_value=0 range=(-3.14 3.14) clamped=true
      Coordinate Thorax_rot2: default_value=0 range=(-3.14 3.14) clamped=true
      Coordinate Thorax_rot3: default_value=0 range=(-3.14 3.14) clamped=true
      Coordinate Thorax_tra1: default_value=0 range=(-3 3) clamped=true
      Coordinate Thorax_tra2: default_value=0 range=(-3 3) clamped=true
      Coordinate Thorax_tra3: default_value=0 range=(-3 3) clamped=true
      PhysicalOffsetFrame ground_offset: socket_parent=/ground translation=(0 0 0) [meters]
      PhysicalOffsetFrame Thorax_offset: socket_parent=/bodyset/Thorax translation=(0 0 0)
      SpatialTransform:
        TransformAxis rotation1: coordinates=Thorax_rot1 axis=(0 0 1) LinearFunction(coefficients=1 0)
        TransformAxis rotation2: coordinates=Thorax_rot2 axis=(0 1 0) LinearFunction(coefficients=1 0)
        TransformAxis rotation3: coordinates=Thorax_rot3 axis=(1 0 0) LinearFunction(coefficients=1 0)
        TransformAxis translation1: coordinates=Thorax_tra1 axis=(1 0 0) LinearFunction(coefficients=1 0)
        TransformAxis translation2: coordinates=Thorax_tra2 axis=(0 1 0) LinearFunction(coefficients=1 0)
        TransformAxis translation3: coordinates=Thorax_tra3 axis=(0 0 1) LinearFunction(coefficients=1 0)
    CustomJoint Thorax_PS: socket_parent_frame=Thorax_offset socket_child_frame=PS_offset
      Coordinate ps_rot1: default_value=0 range=(-0.785 0.785) clamped=true
      Coordinate ps_rot2: default_value=0 range=(-0.785 0.785) clamped=true
      Coordinate ps_rot3: default_value=0 range=(-0.785 0.785) clamped=true
      Coordinate ps_tra1: default_value=0.25 range=(0 1) clamped=true
      Coordinate ps_tra2: default_value=0 range=(-0.25 0.25) clamped=true
      Coordinate ps_tra3: default_value=0 range=(-0.25 0.25) clamped=true
      PhysicalOffsetFrame Thorax_offset: socket_parent=/bodyset/Thorax translation=(0 0 0)
      PhysicalOffsetFrame PS_offset: socket_parent=/bodyset/PS translation=(0 0 0)
      SpatialTransform:
        TransformAxis rotation1: coordinates=ps_rot1 axis=(0 0 1) LinearFunction(coefficients=1 0)
        TransformAxis rotation2: coordinates=ps_rot2 axis=(0 1 0) LinearFunction(coefficients=1 0)
        TransformAxis rotation3: coordinates=ps_rot3 axis=(1 0 0) LinearFunction(coefficients=1 0)
        TransformAxis translation1: coordinates=ps_tra1 axis=(1 0 0) LinearFunction(coefficients=1 0)
        TransformAxis translation2: coordinates=ps_tra2 axis=(0 1 0) LinearFunction(coefficients=1 0)
        TransformAxis translation3: coordinates=ps_tra3 axis=(0 0 1) LinearFunction(coefficients=1 0)
    CustomJoint PS_LPS: socket_parent_frame=PS_offset socket_child_frame=LPS_offset
      Coordinate ps_halfwidth_tra: default_value=0 range=(0 0.1) clamped=true
      PhysicalOffsetFrame PS_offset: socket_parent=/bodyset/PS translation=(0 0 0)
      PhysicalOffsetFrame LPS_offset: socket_parent=/bodyset/LPS translation=(0 0 0.003)
      SpatialTransform: axes_held_at_zero=(rotation1 rotation2 rotation3 translation1 translation2)
        TransformAxis translation3: coordinates=ps_halfwidth_tra axis=(0 0 1) LinearFunction(coefficients=-1 0)
    CustomJoint PS_RPS: socket_parent_frame=PS_offset socket_child_frame=RPS_offset
      Coordinate ps_halfwidth_tra_d: default_value=0 range=(-99999.9 99999.9) clamped=true
      PhysicalOffsetFrame PS_offset: socket_parent=/bodyset/PS translation=(0 0 0)
      PhysicalOffsetFrame RPS_offset: socket_parent=/bodyset/RPS translation=(0 0 -0.003)
      SpatialTransform: axes_held_at_zero=(rotation1 rotation2 rotation3 translation1 translation2)
        TransformAxis translation3: coordinates=ps_halfwidth_tra_d axis=(0 0 1) LinearFunction(coefficients=1 0)
    CustomJoint RA_sternoclavicular: socket_parent_frame=Thorax_offset socket_child_frame=RA_clavicle_offset
      Coordinate ra_sternoclavicular_r2_d: default_value=0 range=(-99999.9 99999.9) clamped=false
      Coordinate ra_sternoclavicular_r3_d: default_value=0 range=(-99999.9 99999.9) clamped=false
      PhysicalOffsetFrame Thorax_offset: socket_parent=/bodyset/Thorax translation=(0.006325 0.00693 0.025465)
      PhysicalOffsetFrame RA_clavicle_offset: socket_parent=/bodyset/RA_clavicle translation=(0 0 0)
      SpatialTransform: axes_held_at_zero=(rotation3 translation1 translation2 translation3)
        TransformAxis rotation1: coordinates=ra_sternoclavicular_r2_d axis=(0.0153 0.9892987 -0.1451)
            LinearFunction(coefficients=1 0)
        TransformAxis rotation2: coordinates=ra_sternoclavicular_r3_d axis=(-0.9944725 0 -0.104997)
            LinearFunction(coefficients=1 0)
    CustomJoint RA_unrotscap: socket_parent_frame=RA_clavicle_offset socket_child_frame=RA_clavphant_offset
      Coordinate ra_unrotscap_r3_d: default_value=0 range=(-99999.9 99999.9) clamped=true
      Coordinate ra_unrotscap_r2_d: default_value=0 range=(-99999.9 99999.9) clamped=true
      PhysicalOffsetFrame RA_clavicle_offset: socket_parent=/bodyset/RA_clavicle
          translation=(-0.01433 0.02007 0.135535)
      PhysicalOffsetFrame RA_clavphant_offset: socket_parent=/bodyset/RA_clavphant translation=(0 0 0)
      SpatialTransform: axes_held_at_zero=(rotation3 translation1 translation2 translation3)
        TransformAxis rotation1: coordinates=ra_unrotscap_r3_d axis=(-0.9944725 0 -0.104997)
            LinearFunction(coefficients=1 0)
        TransformAxis rotation2: coordinates=ra_unrotscap_r2_d axis=(0.0153 0.9892987 -0.1451)
            LinearFunction(coefficients=1 0)
    CustomJoint RA_acromioclavicular: socket_parent_frame=RA_clavphant_offset socket_child_frame=RA_scapula_offset
      Coordinate ra_acromioclavicular_r2_d: default_value=0 range=(-99999.9 99999.9) clamped=true
      Coordinate ra_acromioclavicular_r3_d: default_value=0 range=(-99999.9 99999.9) clamped=true
      Coordinate ra_acromioclavicular_r1_d: default_value=0 range=(-99999.9 99999.9) clamped=true
      PhysicalOffsetFrame RA_clavphant_offset: socket_parent=/bodyset/RA_clavphant translation=(0 0 0)
      PhysicalOffsetFrame RA_scapula_offset: socket_parent=/bodyset/RA_scapula translation=(0 0 0)
      SpatialTransform: axes_held_at_zero=(translation1 translation2 translation3)
        TransformAxis rotation1: coordinates=ra_acromioclavicular_r2_d axis=(0.1570949 0.9472686 -0.2792909)
            LinearFunction(coefficients=1 0)
        TransformAxis rotation2: coordinates=ra_acromioclavicular_r3_d axis=(-0.754084 0.297594 0.585487)
            LinearFunction(coefficients=1 0)
        TransformAxis rotation3: coordinates=ra_acromioclavicular_r1_d axis=(0.6376999 0.1186 0.7610998)
            LinearFunction(coefficients=1 0)
    CustomJoint RA_unrothum: socket_parent_frame=RA_scapula_offset socket_child_frame=RA_scapphant_offset
      Coordinate ra_unrothum_r1_d: default_value=0 range=(-99999.9 99999.9) clamped=false
      Coordinate ra_unrothum_r3_d: default_value=0 range=(-99999.9 99999.9) clamped=false
      Coordinate ra_unrothum_r2_d: default_value=0 range=(-99999.9 99999.9) clamped=false
      PhysicalOffsetFrame RA_scapula_offset: socket_parent=/bodyset/RA_scapula translation=(-0.00955 -0.034 0.009)
      PhysicalOffsetFrame RA_scapphant_offset: socket_parent=/bodyset/RA_scapphant translation=(0 0 0)
      SpatialTransform: axes_held_at_zero=(translation1 translation2 translation3)
        TransformAxis rotation1: coordinates=ra_unrothum_r1_d axis=(0.6376999 0.1186 0.7610998)
            LinearFunction(coefficients=1 0)
        TransformAxis rotation2: coordinates=ra_unrothum_r3_d axis=(-0.754084 0.297594 0.585487)
            LinearFunction(coefficients=1 0)
        TransformAxis rotation3: coordinates=ra_unrothum_r2_d axis=(0.1570949 0.9472686 -0.2792909)
            LinearFunction(coefficients=1 0)
    CustomJoint RA_shoulder0: socket_parent_frame=RA_scapphant_offset socket_child_frame=RA1H_PHANT_offset
      Coordinate ra_sh_elv_angle: default_value=0 range=(-1.570796 2.268928) clamped=true
      PhysicalOffsetFrame RA_scapphant_offset: socket_parent=/bodyset/RA_scapphant translation=(0 0 0)
      PhysicalOffsetFrame RA1H_PHANT_offset: socket_parent=/bodyset/RA1H_PHANT translation=(0 0 0)
      SpatialTransform: axes_held_at_zero=(rotation2 rotation3 translation1 translation2 translation3)
        TransformAxis rotation1: coordinates=ra_sh_elv_angle axis=(0.004800001 0.9990892 0.04240001)
            LinearFunction(coefficients=1 0)
    CustomJoint RA_shoulder1: socket_parent_frame=RA1H_PHANT_offset socket_child_frame=RA1H_PHANT1_offset
      Coordinate ra_sh_elv: default_value=0 range=(0 3.141593) clamped=true
      Coordinate ra_shoulder1_r2_d: default_value=0 range=(-99999.9 99999.9) clamped=false
      PhysicalOffsetFrame RA1H_PHANT_offset: socket_parent=/bodyset/RA1H_PHANT translation=(0 0 0)
      PhysicalOffsetFrame RA1H_PHANT1_offset: socket_parent=/bodyset/RA1H_PHANT1 translation=(0 0 0)
      SpatialTransform: axes_held_at_zero=(rotation3 translation1 translation2 translation3)
        TransformAxis rotation1: coordinates=ra_sh_elv axis=(-0.9982614 0.002300001 0.05889802)
            LinearFunction(coefficients=1 0)
        TransformAxis rotation2: coordinates=ra_shoulder1_r2_d axis=(0.004800001 0.9990892 0.04240001)
            LinearFunction(coefficients=1 0)
    CustomJoint RA_shoulder2: socket_parent_frame=RA1H_PHANT1_offset socket_child_frame=RA1H_offset
      Coordinate ra_sh_rot: default_value=0 range=(-1.570796 0.3490659) clamped=true
      PhysicalOffsetFrame RA1H_PHANT1_offset: socket_parent=/bodyset/RA1H_PHANT1 translation=(0 0 0)
      PhysicalOffsetFrame RA1H_offset: socket_parent=/bodyset/RA1H translation=(0 0 0)
      SpatialTransform: axes_held_at_zero=(rotation2 rotation3 translation1 translation2 translation3)
        TransformAxis rotation1: coordinates=ra_sh_rot axis=(0.004800001 0.9990892 0.04240001)
            LinearFunction(coefficients=1 0)
    CustomJoint RA1H_RA2U: socket_parent_frame=RA1H_offset socket_child_frame=RA2U_offset
      Coordinate ra_el_e_f: default_value=0 range=(0 2.268928) clamped=true
      PhysicalOffsetFrame RA1H_offset: socket_parent=/bodyset/RA1H translation=(0.0061 -0.2904 -0.0123)
      PhysicalOffsetFrame RA2U_offset: socket_parent=/bodyset/RA2U translation=(0 0 0)
      SpatialTransform: axes_held_at_zero=(rotation2 rotation3 translation1 translation2 translation3)
        TransformAxis rotation1: coordinates=ra_el_e_f axis=(0.04940001 0.03660001 0.9981082)
            LinearFunction(coefficients=1 0)
    CustomJoint RA2U_RA2R: socket_parent_frame=RA2U_offset socket_child_frame=RA2R_offset
      Coordinate ra_wr_sup_pro: default_value=0 range=(-1.570796 1.570796) clamped=true
      PhysicalOffsetFrame RA2U_offset: socket_parent=/bodyset/RA2U translation=(0.0004 -0.011503 0.019999)
      PhysicalOffsetFrame RA2R_offset: socket_parent=/bodyset/RA2R translation=(0 0 0)
      SpatialTransform: axes_held_at_zero=(rotation2 rotation3 translation1 translation2 translation3)
        TransformAxis rotation1: coordinates=ra_wr_sup_pro axis=(-0.01716099 0.9926656 -0.119668)
            LinearFunction(coefficients=1 0)
    CustomJoint RA2R_RA3L: socket_parent_frame=RA2R_offset socket_child_frame=RA3L_offset
      Coordinate ra_wr_rd_ud: default_value=0 range=(-0.1745329 0.4363323) clamped=true
      Coordinate ra_wr_e_f: default_value=0 range=(-1.22173 1.22173) clamped=true
      PhysicalOffsetFrame RA2R_offset: socket_parent=/bodyset/RA2R translation=(0.018 -0.242 0.025)
      PhysicalOffsetFrame RA3L_offset: socket_parent=/bodyset/RA3L translation=(0 0 0)
      SpatialTransform: axes_held_at_zero=(rotation3 translation1 translation2 translation3)
        TransformAxis rotation1: coordinates=ra_wr_rd_ud axis=(-0.819064 -0.135611 -0.557444)
            LinearFunction(coefficients=1 0)
        TransformAxis rotation2: coordinates=ra_wr_e_f axis=(0.9564267 -0.2522069 0.147104)
            LinearFunction(coefficients=1 0)
    WeldJoint RA3L_RA3S_W: socket_parent_frame=RA3L_offset socket_child_frame=RA3S_offset
      PhysicalOffsetFrame RA3L_offset: socket_parent=/bodyset/RA3L translation=(0.012345 -0.004464 -0.001254)
      PhysicalOffsetFrame RA3S_offset: socket_parent=/bodyset/RA3S translation=(0 0 0)
    WeldJoint RA3S_RA3P_W: socket_parent_frame=RA3L_offset socket_child_frame=RA3P_offset
      PhysicalOffsetFrame RA3L_offset: socket_parent=/bodyset/RA3L translation=(-0.013388 -0.009886 -0.010593)
      PhysicalOffsetFrame RA3P_offset: socket_parent=/bodyset/RA3P translation=(0 0 0)
    WeldJoint RA3L_RA3Q_W: socket_parent_frame=RA3L_offset socket_child_frame=RA3Q_offset
      PhysicalOffsetFrame RA3L_offset: socket_parent=/bodyset/RA3L translation=(-0.010784 -0.007499 -0.001289)
      PhysicalOffsetFrame RA3Q_offset: socket_parent=/bodyset/RA3Q translation=(0 0 0)
    CustomJoint RA3L_RA3C: socket_parent_frame=RA3L_offset socket_child_frame=RA3C_offset
      Coordinate ra_proximal_distal_r1_d: default_value=0 range=(-99999.9 99999.9) clamped=false
      Coordinate ra_proximal_distal_r3_d: default_value=0 range=(-99999.9 99999.9) clamped=false
      PhysicalOffsetFrame RA3L_offset: socket_parent=/bodyset/RA3L translation=(0.003992 -0.015054 0.002327)
      PhysicalOffsetFrame RA3C_offset: socket_parent=/bodyset/RA3C translation=(0 0 0)
      SpatialTransform: axes_held_at_zero=(rotation3 translation1 translation2 translation3)
        TransformAxis rotation1: coordinates=ra_proximal_distal_r1_d axis=(0.8991357 -0.3490529 -0.2640399)
            LinearFunction(coefficients=1 0)
        TransformAxis rotation2: coordinates=ra_proximal_distal_r3_d axis=(0.9971185 0.01069999 -0.07510096)
            LinearFunction(coefficients=1 0)
    WeldJoint RA3C_RA3T_W: socket_parent_frame=RA3C_offset socket_child_frame=RA3T_offset
      PhysicalOffsetFrame RA3C_offset: socket_parent=/bodyset/RA3C translation=(0.015293 -0.004569 -0.010308)
      PhysicalOffsetFrame RA3T_offset: socket_parent=/bodyset/RA3T translation=(0 0 0)
    WeldJoint RA3C_RA3O_W: socket_parent_frame=RA3C_offset socket_child_frame=RA3O_offset
      PhysicalOffsetFrame RA3C_offset: socket_parent=/bodyset/RA3C translation=(0.009143 -0.004062 -0.002464)
      PhysicalOffsetFrame RA3O_offset: socket_parent=/bodyset/RA3O translation=(0 0 0)
    WeldJoint RA3C_RA3H_W: socket_parent_frame=RA3C_offset socket_child_frame=RA3H_offset
      PhysicalOffsetFrame RA3C_offset: socket_parent=/bodyset/RA3C translation=(-0.010969 -0.002495 -0.00075)
      PhysicalOffsetFrame RA3H_offset: socket_parent=/bodyset/RA3H translation=(0 0 0)
    CustomJoint RA3T_RA4M1_PHANT: socket_parent_frame=RA3T_offset socket_child_frame=RA4M1_PHANT_offset
      Coordinate ra_cmc1_f_e: default_value=0 range=(-0.2617994 0.7853982) clamped=true
      Coordinate ra_cmc1_opp: default_value=0 range=(-0.7853982 0.7853982) clamped=true
      PhysicalOffsetFrame RA3T_offset: socket_parent=/bodyset/RA3T translation=(0 0 0)
      PhysicalOffsetFrame RA4M1_PHANT_offset: socket_parent=/bodyset/RA4M1_PHANT translation=(0 0 0)
      SpatialTransform: axes_held_at_zero=(rotation3 translation1 translation2 translation3)
        TransformAxis rotation1: coordinates=ra_cmc1_f_e axis=(-0.04239899 -0.6652859 0.7453838)
            LinearFunction(coefficients=1 0)
        TransformAxis rotation2: coordinates=ra_cmc1_opp axis=(-0.6666976 0.6189287 0.4152607)
            LinearFunction(coefficients=1 0)
    CustomJoint RA4M1_PHANT_RA4M1: socket_parent_frame=RA4M1_PHANT_offset socket_child_frame=RA4M1_offset
      Coordinate ra_cmc1_ad_ab: default_value=0 range=(-0.4363323 0.4363323) clamped=true
      PhysicalOffsetFrame RA4M1_PHANT_offset: socket_parent=/bodyset/RA4M1_PHANT translation=(0.0072 -0.0054 -0.0025)
      PhysicalOffsetFrame RA4M1_offset: socket_parent=/bodyset/RA4M1 translation=(0 0 0)
      SpatialTransform: axes_held_at_zero=(rotation2 rotation3 translation1 translation2 translation3)
        TransformAxis rotation1: coordinates=ra_cmc1_ad_ab axis=(0.495557 0.731736 0.467959)
            LinearFunction(coefficients=1 0)
    WeldJoint RA3C_RA4M2_W: socket_parent_frame=RA3C_offset socket_child_frame=RA4M2_offset
      PhysicalOffsetFrame RA3C_offset: socket_parent=/bodyset/RA3C translation=(0.014685 -0.03762 0.005032)
      PhysicalOffsetFrame RA4M2_offset: socket_parent=/bodyset/RA4M2 translation=(0 0 0)
    WeldJoint RA3C_RA4M3_W: socket_parent_frame=RA3C_offset socket_child_frame=RA4M3_offset
      PhysicalOffsetFrame RA3C_offset: socket_parent=/bodyset/RA3C translation=(0.000477 -0.039239 0.007377)
      PhysicalOffsetFrame RA4M3_offset: socket_parent=/bodyset/RA4M3 translation=(0 0 0)
    WeldJoint RA3C_RA4M4_W: socket_parent_frame=RA3C_offset socket_child_frame=RA4M4_offset
      PhysicalOffsetFrame RA3C_offset: socket_parent=/bodyset/RA3C translation=(-0.012046 -0.040519 0.003513)
      PhysicalOffsetFrame RA4M4_offset: socket_parent=/bodyset/RA4M4 translation=(0 0 0)
    WeldJoint RA3C_RA4M5_W: socket_parent_frame=RA3C_offset socket_child_frame=RA4M5_offset
      PhysicalOffsetFrame RA3C_offset: socket_parent=/bodyset/RA3C translation=(-0.021896 -0.034683 -0.004218)
      PhysicalOffsetFrame RA4M5_offset: socket_parent=/bodyset/RA4M5 translation=(0 0 0)
    CustomJoint RA4M1_RA5P1: socket_parent_frame=RA4M1_offset socket_child_frame=RA5P1_offset
      Coordinate ra_mcp1_e_f: default_value=0 range=(-0.5235988 0.6981317) clamped=true
      PhysicalOffsetFrame RA4M1_offset: socket_parent=/bodyset/RA4M1 translation=(0.0165 -0.0292 -0.0127)
      PhysicalOffsetFrame RA5P1_offset: socket_parent=/bodyset/RA5P1 translation=(0 0 0)
      SpatialTransform: axes_held_at_zero=(rotation2 rotation3 translation1 translation2 translation3)
        TransformAxis rotation1: coordinates=ra_mcp1_e_f axis=(0 0.2 -1) LinearFunction(coefficients=1 0)
    CustomJoint RA5P1_RA6D1: socket_parent_frame=RA5P1_offset socket_child_frame=RA6D1_offset
      Coordinate ra_ip1_e_f: default_value=0 range=(-1.308997 1.308997) clamped=true
      PhysicalOffsetFrame RA5P1_offset: socket_parent=/bodyset/RA5P1 translation=(0.014 -0.0259 -0.0101)
      PhysicalOffsetFrame RA6D1_offset: socket_parent=/bodyset/RA6D1 translation=(0 0 0)
      SpatialTransform: axes_held_at_zero=(rotation2 rotation3 translation1 translation2 translation3)
        TransformAxis rotation1: coordinates=ra_ip1_e_f axis=(0.05010201 0.4796231 -0.8760431)
            LinearFunction(coefficients=1 0)
    CustomJoint RA4M2_RA5P2: socket_parent_frame=RA4M2_offset socket_child_frame=RA5P2_offset
      Coordinate ra_mcp2_e_f: default_value=0 range=(-0.8726646 1.570796) clamped=true
      Coordinate ra_mcp2_ad_ab: default_value=0 range=(-0.2617994 0.5217994) clamped=true
      PhysicalOffsetFrame RA4M2_offset: socket_parent=/bodyset/RA4M2 translation=(0.003501 -0.028243 0.00362)
          orientation=(2.97153 -0.173733 1.59226) [radians]
      PhysicalOffsetFrame RA5P2_offset: socket_parent=/bodyset/RA5P2 translation=(0 0 0)
          orientation=(2.97153 -0.173733 1.59226)
      SpatialTransform: axes_held_at_zero=(rotation3 translation1 translation2 translation3)
        TransformAxis rotation1: coordinates=ra_mcp2_e_f axis=(0 -1 0) LinearFunction(coefficients=1 0)
        TransformAxis rotation2: coordinates=ra_mcp2_ad_ab axis=(0 0 -1) LinearFunction(coefficients=1 0)
    CustomJoint RA5P2_RA6M2: socket_parent_frame=RA5P2_offset socket_child_frame=RA6M2_offset
      Coordinate ra_pip2_e_f: default_value=0 range=(0 2.094395) clamped=true
      PhysicalOffsetFrame RA5P2_offset: socket_parent=/bodyset/RA5P2 translation=(0.007517 -0.041273 0.007326)
          orientation=(0.869684 -1.4208 2.3312)
      PhysicalOffsetFrame RA6M2_offset: socket_parent=/bodyset/RA6M2 translation=(0 0 0)
          orientation=(0.869684 -1.4208 2.3312)
      SpatialTransform: axes_held_at_zero=(rotation2 rotation3 translation1 translation2 translation3)
        TransformAxis rotation1: coordinates=ra_pip2_e_f axis=(0.1 0 -1) LinearFunction(coefficients=1 0)
    CustomJoint RA6M2_RA7D2: socket_parent_frame=RA6M2_offset socket_child_frame=RA7D2_offset
      Coordinate ra_dip2_e_f: default_value=0 range=(-0.5235988 1.570796) clamped=true
      PhysicalOffsetFrame RA6M2_offset: socket_parent=/bodyset/RA6M2 translation=(0.003333 -0.024888 0.00122)
          orientation=(0.326422 -0.0790475 2.03982)
      PhysicalOffsetFrame RA7D2_offset: socket_parent=/bodyset/RA7D2 translation=(0 0 0)
          orientation=(0.326422 -0.0790475 2.03982)
      SpatialTransform: axes_held_at_zero=(rotation2 rotation3 translation1 translation2 translation3)
        TransformAxis rotation1: coordinates=ra_dip2_e_f axis=(-0.4 -1 -0.2) LinearFunction(coefficients=1 0)
    CustomJoint RA4M3_RA5P3: socket_parent_frame=RA4M3_offset socket_child_frame=RA5P3_offset
      Coordinate ra_mcp3_e_f: default_value=0 range=(-0.8726646 1.570796) clamped=true
      Coordinate ra_mcp3_rd_ud: default_value=0 range=(-0.2617994 0.2617994) clamped=true
      PhysicalOffsetFrame RA4M3_offset: socket_parent=/bodyset/RA4M3 translation=(0.00024 -0.02629 0.001778)
      PhysicalOffsetFrame RA5P3_offset: socket_parent=/bodyset/RA5P3 translation=(0 0 0)
      SpatialTransform: axes_held_at_zero=(rotation3 translation1 translation2 translation3)
        TransformAxis rotation1: coordinates=ra_mcp3_e_f axis=(1 0 0) LinearFunction(coefficients=1 0)
        TransformAxis rotation2: coordinates=ra_mcp3_rd_ud axis=(0 -0.5 -1) LinearFunction(coefficients=1 0)
    CustomJoint RA5P3_RA6M3: socket_parent_frame=RA5P3_offset socket_child_frame=RA6M3_offset
      Coordinate ra_pip3_e_f: default_value=0 range=(0 2.094395) clamped=true
      PhysicalOffsetFrame RA5P3_offset: socket_parent=/bodyset/RA5P3 translation=(0.00165 -0.044211 0.00623)
      PhysicalOffsetFrame RA6M3_offset: socket_parent=/bodyset/RA6M3 translation=(0 0 0)
      SpatialTransform: axes_held_at_zero=(rotation2 rotation3 translation1 translation2 translation3)
        TransformAxis rotation1: coordinates=ra_pip3_e_f axis=(1 0 0) LinearFunction(coefficients=1 0)
    CustomJoint RA6M3_RA7D3: socket_parent_frame=RA6M3_offset socket_child_frame=RA7D3_offset
      Coordinate ra_dip3_e_f: default_value=0 range=(-0.5235988 1.570796) clamped=true
      PhysicalOffsetFrame RA6M3_offset: socket_parent=/bodyset/RA6M3 translation=(0.001365 -0.029047 0.001954)
      PhysicalOffsetFrame RA7D3_offset: socket_parent=/bodyset/RA7D3 translation=(0 0 0)
      SpatialTransform: axes_held_at_zero=(rotation2 rotation3 translation1 translation2 translation3)
        TransformAxis rotation1: coordinates=ra_dip3_e_f axis=(1 0.1 0) LinearFunction(coefficients=1 0)
    CustomJoint RA4M4_RA5P4: socket_parent_frame=RA4M4_offset socket_child_frame=RA5P4_offset
      Coordinate ra_mcp4_e_f: default_value=0 range=(-0.8726646 1.570796) clamped=true
      Coordinate ra_mcp4_ad_ab: default_value=0 range=(-0.2617994 0.2617994) clamped=true
      PhysicalOffsetFrame RA4M4_offset: socket_parent=/bodyset/RA4M4 translation=(-0.00183 -0.023689 -0.000173)
      PhysicalOffsetFrame RA5P4_offset: socket_parent=/bodyset/RA5P4 translation=(0 0 0)
      SpatialTransform: axes_held_at_zero=(rotation3 translation1 translation2 translation3)
        TransformAxis rotation1: coordinates=ra_mcp4_e_f axis=(1 -0.05 0.1) LinearFunction(coefficients=1 0)
        TransformAxis rotation2: coordinates=ra_mcp4_ad_ab axis=(0.1 -0.7 -1) LinearFunction(coefficients=1 0)
    CustomJoint RA5P4_RA6M4: socket_parent_frame=RA5P4_offset socket_child_frame=RA6M4_offset
      Coordinate ra_pip4_e_f: default_value=0 range=(0 2.094395) clamped=true
      PhysicalOffsetFrame RA5P4_offset: socket_parent=/bodyset/RA5P4 translation=(-0.003528 -0.040255 0.001345)
          orientation=(-3.14059 -0.0151074 -3.0091)
      PhysicalOffsetFrame RA6M4_offset: socket_parent=/bodyset/RA6M4 translation=(0 0 0)
          orientation=(-3.14059 -0.0151074 -3.0091)
      SpatialTransform: axes_held_at_zero=(rotation2 rotation3 translation1 translation2 translation3)
        TransformAxis rotation1: coordinates=ra_pip4_e_f axis=(-1 0.2 -0.4) LinearFunction(coefficients=1 0)
    CustomJoint RA6M4_RA7D4: socket_parent_frame=RA6M4_offset socket_child_frame=RA7D4_offset
      Coordinate ra_dip4_e_f: default_value=0 range=(-0.5235988 1.570796) clamped=true
      PhysicalOffsetFrame RA6M4_offset: socket_parent=/bodyset/RA6M4 translation=(-0.002317 -0.024789 0.000563)
          orientation=(3.13802 0.0382843 -2.95545)
      PhysicalOffsetFrame RA7D4_offset: socket_parent=/bodyset/RA7D4 translation=(0 0 0)
          orientation=(3.13802 0.0382843 -2.95545)
      SpatialTransform: axes_held_at_zero=(rotation2 rotation3 translation1 translation2 translation3)
        TransformAxis rotation1: coordinates=ra_dip4_e_f axis=(-1 0.1 -0.5) LinearFunction(coefficients=1 0)
    CustomJoint RA4M5_RA5P5: socket_parent_frame=RA4M5_offset socket_child_frame=RA5P5_offset
      Coordinate ra_mcp5_e_f: default_value=0 range=(-0.8726646 1.570796) clamped=true
      Coordinate ra_mcp5_ad_ab: default_value=0 range=(-0.2617994 0.5217994) clamped=true
      PhysicalOffsetFrame RA4M5_offset: socket_parent=/bodyset/RA4M5 translation=(-0.001597 -0.021431 -0.001496)
          orientation=(2.97153 -0.173733 1.59226)
      PhysicalOffsetFrame RA5P5_offset: socket_parent=/bodyset/RA5P5 translation=(0 0 0)
          orientation=(2.97153 -0.173733 1.59226)
      SpatialTransform: axes_held_at_zero=(rotation3 translation1 translation2 translation3)
        TransformAxis rotation1: coordinates=ra_mcp5_e_f axis=(0.1 -1 -0.7) LinearFunction(coefficients=1 0)
        TransformAxis rotation2: coordinates=ra_mcp5_ad_ab axis=(0 -0.7 1) LinearFunction(coefficients=1 0)
    CustomJoint RA5P5_RA6M5: socket_parent_frame=RA5P5_offset socket_child_frame=RA6M5_offset
      Coordinate ra_pip5_e_f: default_value=0 range=(0 2.094395) clamped=true
      PhysicalOffsetFrame RA5P5_offset: socket_parent=/bodyset/RA5P5 translation=(-0.005279 -0.035563 -0.002879)
      PhysicalOffsetFrame RA6M5_offset: socket_parent=/bodyset/RA6M5 translation=(0 0 0)
      SpatialTransform: axes_held_at_zero=(rotation2 rotation3 translation1 translation2 translation3)
        TransformAxis rotation1: coordinates=ra_pip5_e_f axis=(1 -0.2 0.6) LinearFunction(coefficients=1 0)
    CustomJoint RA6M5_RA7D5: socket_parent_frame=RA6M5_offset socket_child_frame=RA7D5_offset
      Coordinate ra_dip5_e_f: default_value=0 range=(-0.5235988 1.570796) clamped=true
      PhysicalOffsetFrame RA6M5_offset: socket_parent=/bodyset/RA6M5 translation=(-0.002871 -0.020677 -0.002243)
      PhysicalOffsetFrame RA7D5_offset: socket_parent=/bodyset/RA7D5 translation=(0 0 0)
      SpatialTransform: axes_held_at_zero=(rotation2 rotation3 translation1 translation2 translation3)
        TransformAxis rotation1: coordinates=ra_dip5_e_f axis=(1 -0.2 0.9) LinearFunction(coefficients=1 0)
  ConstraintSet:
    CoordinateCouplerConstraint [values shared by the 14 below unless stated]: independent_coordinate_names=ra_sh_elv
    CoordinateCouplerConstraint ra_sternoclavicular_r2_con: dependent_coordinate_name=ra_sternoclavicular_r2_d
      coupled_coordinates_function: SimmSpline RA_f0: x=(0 2.61799) y=(0 -0.633555)
    CoordinateCouplerConstraint ra_sternoclavicular_r3_con: dependent_coordinate_name=ra_sternoclavicular_r3_d
      coupled_coordinates_function: SimmSpline RA_f1: x=(0 3.14159) y=(0 0.322013)
    CoordinateCouplerConstraint ra_unrotscap_r2_con: dependent_coordinate_name=ra_unrotscap_r2_d
      coupled_coordinates_function: SimmSpline RA_f2: x=(0 2.61799) y=(0 0.633555)
    CoordinateCouplerConstraint ra_unrotscap_r3_con: dependent_coordinate_name=ra_unrotscap_r3_d
      coupled_coordinates_function: SimmSpline RA_f3: x=(0 3.14159) y=(0 -0.322013)
    CoordinateCouplerConstraint ra_acromioclavicular_r1_con: dependent_coordinate_name=ra_acromioclavicular_r1_d
      coupled_coordinates_function: SimmSpline RA_f4: x=(0 2.61799) y=(0 0.466003)
    CoordinateCouplerConstraint ra_acromioclavicular_r2_con: dependent_coordinate_name=ra_acromioclavicular_r2_d
      coupled_coordinates_function: SimmSpline RA_f5: x=(0 2.61799) y=(0 -0.128282)
    CoordinateCouplerConstraint ra_acromioclavicular_r3_con: dependent_coordinate_name=ra_acromioclavicular_r3_d
      coupled_coordinates_function: SimmSpline RA_f6: x=(0 2.61799) y=(0 1.03673)
    CoordinateCouplerConstraint ra_unrothum_r1_con: dependent_coordinate_name=ra_unrothum_r1_d
      coupled_coordinates_function: SimmSpline RA_f7: x=(0 2.61799) y=(0 -0.466003)
    CoordinateCouplerConstraint ra_unrothum_r2_con: dependent_coordinate_name=ra_unrothum_r2_d
      coupled_coordinates_function: SimmSpline RA_f8: x=(0 2.61799) y=(0 0.128282)
    CoordinateCouplerConstraint ra_unrothum_r3_con: dependent_coordinate_name=ra_unrothum_r3_d
      coupled_coordinates_function: SimmSpline RA_f9: x=(0 2.61799) y=(0 -1.03673)
    CoordinateCouplerConstraint ra_shoulder1_r2_con: independent_coordinate_names=ra_sh_elv_angle
        dependent_coordinate_name=ra_shoulder1_r2_d
      coupled_coordinates_function: SimmSpline RA_f11: x=(-1.5708 3.14159) y=(1.5708 -3.14159)
    CoordinateCouplerConstraint ra_proximal_distal_r1_con: independent_coordinate_names=ra_wr_rd_ud
        dependent_coordinate_name=ra_proximal_distal_r1_d
      coupled_coordinates_function: SimmSpline RA_f18: x=(-0.174533 0 0.436332) y=(-0.261799 0 0.436332)
    CoordinateCouplerConstraint ra_proximal_distal_r3_con: independent_coordinate_names=ra_wr_e_f
        dependent_coordinate_name=ra_proximal_distal_r3_d
      coupled_coordinates_function: SimmSpline RA_f19: x=(-1.22173 1.22173) y=(-0.610865 0.610865)
    CoordinateCouplerConstraint ps_halfwidth_tra_con: independent_coordinate_names=ps_halfwidth_tra
        dependent_coordinate_name=ps_halfwidth_tra_d
      coupled_coordinates_function: SimmSpline RA_f20: x=(-1 1) y=(-1 1)
  MarkerSet:
    Marker M_SternumTop: Thorax (0.02053541 -0.04376965 -0.02436013) fixed=true
    Marker M_SternumBot: Thorax (0.06447709 -0.1401564 9.258362e-5)
    Marker M_RScapulaAnt: RA_scapula (0.01974845 -0.02369433 -0.01362939)
    Marker M_RScapulaPost: RA_scapula (-0.007226895 -0.001639826 0.009516122)
    Marker M_RA1H_ME: RA1H (0.002598554 -0.2577488 -0.04589299) fixed=true
    Marker M_RA1H_LE: RA1H (-0.002126518 -0.2790569 0.01874539)
    Marker M_RA1H_IE: RA1H (0.02457636 -0.2679379 -0.009340828) fixed=true
    Marker M_RA1H_DT: RA1H (-0.0003171087 -0.1203341 0.01512767)
    Marker M_RA2U_D: RA2U (-0.01395668 -0.1677139 0.02921746) fixed=true
    Marker M_RA2U_SP: RA2U (-0.007418639 -0.256776 0.04876983)
    Marker M_RA2U_OL: RA2U (-0.03327298 0.000380033 -0.005784516)
    Marker M_RA2R_M: RA2R (0.019871 -0.2409545 0.04119223)
    Marker M_RA2R_SP: RA2R (0.04045359 -0.2390901 0.03006887)
    Marker M_RA3M: RA3C (-0.005278301 -0.03586057 0.01504323)
    Marker M_RA6D1_H: RA6D1 (0.009072918 -0.01709394 -0.008143289)
    Marker M_RA4M1_B: RA4M1 (0.009764813 0.0008245627 0.0007616018)
    Marker M_RA7D2_H: RA7D2 (0.001955428 -0.01856712 0.001494208)
    Marker M_RA6M2_H: RA6M2 (0.003553454 -0.02581332 0.002941893)
    Marker M_RA5P2_H: RA5P2 (0.007973096 -0.04123526 0.009609625)
    Marker M_RA4M2: RA4M2 (0.00344999 -0.01565446 0.008521845)
    Marker M_RA7D3_H: RA7D3 (0.001525309 -0.01982169 0.004401726)
    Marker M_RA6M3_H: RA6M3 (0.001115283 -0.02813187 0.005316147)
    Marker M_RA5P3_H: RA5P3 (0.001665491 -0.04090654 0.01055673)
    Marker M_RA4M3: RA4M3 (-0.0005252899 -0.01496801 0.008218033)
    Marker M_RA7D4_H: RA7D4 (-0.002967124 -0.01860821 0.004862163)
    Marker M_RA6M4_H: RA6M4 (-0.002962745 -0.02373001 0.003865723)
    Marker M_RA5P4_H: RA5P4 (-0.005369522 -0.03675851 0.00728436)
    Marker M_RA4M4: RA4M4 (-0.002405504 -0.01005328 0.007086886)
    Marker M_RA7D5_H: RA7D5 (-0.002962278 -0.01844841 0.0001775816)
    Marker M_RA6M5_H: RA6M5 (-0.004628624 -0.01894574 0.0008861038)
    Marker M_RA5P5_H: RA5P5 (-0.006224673 -0.03463669 -0.0007663962)
    Marker M_RA4M5: RA4M5 (-0.003148855 -0.008564015 0.005897938)
    Marker M_RA4M1_H: RA4M1 (0.022906 -0.02828705 -0.01100036)
    Marker M_RA5P1_H: RA5P1 (0.0170032 -0.02360604 -0.008815813) fixed=true
    Marker M_RPS_BLUE_TF: RPS (-0.04189 0.04133 0.003) fixed=true
    Marker M_RPS_BLUE_TB: RPS (0.04189 0.04133 0.003) fixed=true
    Marker M_RPS_BLUE_BB: RPS (0.04189 -0.04133 0.003) fixed=true
    Marker M_RPS_BLUE_BF: RPS (-0.04189 -0.04133 0.003) fixed=true
    Marker M_LPS_ORANGE_TF: LPS (-0.04189 0.04133 -0.003) fixed=true
    Marker M_LPS_ORANGE_TB: LPS (0.04189 0.04133 -0.003) fixed=true
    Marker M_LPS_ORANGE_BB: LPS (0.04189 -0.04133 -0.003)
    Marker M_LPS_ORANGE_BF: LPS (-0.04189 -0.04133 -0.003) fixed=true
    Marker M_RA_clavicle_D: RA_clavicle (-0.005213579 0.009023194 0.06062225)
    Marker M_RA_clavicle_P: RA_clavicle (0.00165699 -0.003707772 0.003629846)
    Marker M_Thorax_LClav_P: Thorax (0 0 -0.01942195)
    Marker M_Thorax_LClav_D: Thorax (-0.005515046 0.0143041 -0.06349049)
    Marker M_Thorax_Sternum_M: Thorax (0.02758736 -0.04716117 0)
    Marker M_Thorax_Sternum_B: Thorax (0.04024445 -0.09709752 0)
